// SBML level 2 version 1

function kl_0(A, E, kcat_Km, Km, kcat)
  E*kcat*A/(Km + A);
end

model SABIOmdl03Sep2008551_xml()
  // This model has been created with the help of the SABIO-RK Database (http://sabio.villa-bosch.de/SABIORK)

  // Compartments:
  compartment compart_1 = 1; compart_1 is "Cell";

  // Species:
  species spc_1 in compart_1; spc_1 is "alpha-D-Glucose";
  species spc_2 in compart_1; spc_2 is "D-Fructose";
  species enz_1 in compart_1; enz_1 is "Xylose isomerase(Enzyme)";
  species spc_3 in compart_1; spc_3 is "Mg2+";

  // Reactions:
  reac_0: spc_1 -> spc_2; kl_0(spc_1, enz_1, kcat_Km_spc_1, Km_spc_1, kcat);  // modifiers: enz_1, spc_3
    kcat_Km_spc_1 = 37 onedivMsec; Km_spc_1 = 64 mM; kcat = 2.35 onedivsec;

  // Unit definitions:
  unit onedivsec = 1 / second;
  unit mM = 1e-3 mole / litre;
  unit onedivMsec = litre / (second * mole);
end
